<?xml version="1.0"?>
<?xml-stylesheet type="text/xsl" href="http://jsbsim.sourceforge.net/JSBSim.xsl"?>
<fdm_config name="aerocar" version="2.0" release="ALPHA"
   xmlns:xsi="http://www.w3.org/2001/XMLSchema-instance"
   xsi:noNamespaceSchemaLocation="http://jsbsim.sourceforge.net/JSBSim.xsd">

 <fileheader>
  <author> Aeromatic v 0.91 </author>
  <filecreationdate> 2009-11-19 </filecreationdate>
  <version>$Revision: 1.10 $</version>
  <description> Models a aerocar. </description>
 </fileheader>

<!--
  File:     aerocar.xml
  Inputs:
    name:          aerocar
    type:          light single
    max weight:    2050.0 lb
    wing span:     34 ft
    length:        21.6 ft
    wing area:     168 sq-ft
    gear type:     tricycle
    retractable?:  no
    # engines:     1
    engine type:   piston
    engine layout: aft fuselage
    yaw damper?    no

  Outputs:
    wing loading:  12.50 lb/sq-ft
    CL-alpha:      5 per radian
    CL-0:          0.25
    CL-max:        1.4
    CD-0:          0.028
    K:             0.04

-->

<!--

Landing Run (braked)	:	300 ft
Takeoff Run (loaded)	:	650 ft

Road RPM				:	2000 RPM at 50 MPH

Ceiling					:	12000 ft
Rate of Climb (2050 lbs):	over 550 ft/min

Top Speed				:	over 110 mph
Cruise Speed			:	over 100 mph
Landing speed			:	50-55 mph
Top Road Speed			:	67 mph
Stall speed (2050 lbs)	:	51 mph
VNE						:	139 mph (121 kts)

Maximmum Weight			:	60 lbs
Fuel capacity			:	23.5 gals. (21.2 gals. usable)
Oil capacity			:	2 gals.

-->

 <metrics>
   <wingarea  unit="FT2">  168.00 </wingarea>
   <wingspan  unit="FT" >   34.00 </wingspan>
   <wing_incidence>          2.00 </wing_incidence>
   <chord     unit="FT" >    4.94 </chord>
   <htailarea unit="FT2">   26.88 </htailarea>
   <htailarm  unit="FT" >   11.23 </htailarm>
   <vtailarea unit="FT2">   16.80 </vtailarea>
   <vtailarm  unit="FT" >   10.80 </vtailarm>
   <location name="AERORP" unit="M">
     <x>  0.000	 </x>
     <y>  0.000 </y>
     <z>  0.000 </z>
   </location>
   <location name="EYEPOINT" unit="IN">
     <x>  33.70 </x>
     <y> -18.00 </y>
     <z>  45.00 </z>
   </location>
   <location name="VRP" unit="IN">
     <x>0</x>
     <y>0</y>
     <z>0</z>
   </location>
 </metrics>

 <mass_balance>
   <ixx unit="SLUG*FT2">       824 </ixx>
   <iyy unit="SLUG*FT2">       592 </iyy>
   <izz unit="SLUG*FT2">      1334 </izz>
   <emptywt unit="LBS" >      1300 </emptywt>
   <location name="CG" unit="M">
     <x> -0.400 </x>
     <y>  0.000 </y>
     <z> -0.950 </z>
   </location>
   <pointmass name="Driver">
     <weight unit="LBS"> 170 </weight>
     <location name="POINTMASS" unit="M">
       <x> -1.161 </x>
       <y> -0.270 </y>
       <z> -0.926 </z>
     </location>
   </pointmass>
   <pointmass name="Passenger">
     <weight unit="LBS"> 170 </weight>
     <location name="POINTMASS" unit="M">
       <x> -1.161 </x>
       <y>  0.270 </y>
       <z> -0.926 </z>
     </location>
   </pointmass>
 </mass_balance>

 <ground_reactions>

 <contact type="BOGEY" name="LEFT_FRONT">
   <location unit="M">
     <x> -2.277 </x>
     <y> -1.000 </y>
     <z> -1.952 </z>
   </location>
   <static_friction>  0.80 </static_friction>
   <dynamic_friction> 0.50 </dynamic_friction>
   <rolling_friction> 0.02 </rolling_friction>
   <spring_coeff unit="LBS/FT">       2100.00 </spring_coeff>
   <damping_coeff unit="LBS/FT/SEC">   420.00 </damping_coeff>
   <max_steer unit="DEG">30</max_steer>
   <brake_group>LEFT</brake_group>
   <retractable>0</retractable>
 </contact>

 <contact type="BOGEY" name="RIGHT_FRONT">
   <location unit="M">
     <x> -2.277 </x>
     <y>  1.000 </y>
     <z> -1.952 </z>
   </location>
   <static_friction>  0.80 </static_friction>
   <dynamic_friction> 0.50 </dynamic_friction>
   <rolling_friction> 0.02 </rolling_friction>
   <spring_coeff unit="LBS/FT">       2100.00 </spring_coeff>
   <damping_coeff unit="LBS/FT/SEC">   420.00 </damping_coeff>
   <max_steer unit="DEG">30</max_steer>
   <brake_group>RIGHT</brake_group>
   <retractable>0</retractable>
 </contact>

 <contact type="BOGEY" name="LEFT_REAR">
   <location unit="M">
     <x>  0.242 </x>
     <y> -1.000 </y>
     <z> -1.953 </z>
   </location>
   <static_friction>  0.80 </static_friction>
   <dynamic_friction> 0.50 </dynamic_friction>
   <rolling_friction> 0.02 </rolling_friction>
   <spring_coeff unit="LBS/FT">       2100.00 </spring_coeff>
   <damping_coeff unit="LBS/FT/SEC">   420.00 </damping_coeff>
   <max_steer unit="DEG">0</max_steer>
   <brake_group>LEFT</brake_group>
   <retractable>0</retractable>
 </contact>

 <contact type="BOGEY" name="RIGHT_REAR">
   <location unit="M">
     <x>  0.242 </x>
     <y>  1.000 </y>
     <z> -1.953 </z>
   </location>
   <static_friction>  0.80 </static_friction>
   <dynamic_friction> 0.50 </dynamic_friction>
   <rolling_friction> 0.02 </rolling_friction>
   <spring_coeff unit="LBS/FT">       2100.00 </spring_coeff>
   <damping_coeff unit="LBS/FT/SEC">   420.00 </damping_coeff>
   <max_steer unit="DEG">0</max_steer>
   <brake_group>RIGHT</brake_group>
   <retractable>0</retractable>
 </contact>

 <contact type="STRUCTURE" name="LEFT_WING">
   <location unit="M">
     <x> -0.607 </x>
     <y> -5.182 </y>
     <z> -0.094 </z>
   </location>
   <static_friction>  0.80 </static_friction>
   <dynamic_friction> 0.50 </dynamic_friction>
   <rolling_friction> 0.02 </rolling_friction>
   <spring_coeff unit="LBS/FT"> 249900 </spring_coeff>
   <damping_coeff unit="LBS/FT/SEC">   83300  </damping_coeff>
   <max_steer unit="DEG">0</max_steer>
   <brake_group>RIGHT</brake_group>
   <retractable>0</retractable>
 </contact>

 <contact type="STRUCTURE" name="RIGHT_WING">
   <location unit="M">
     <x> -0.607 </x>
     <y>  5.182 </y>
     <z> -0.094 </z>
   </location>
   <static_friction>  0.80 </static_friction>
   <dynamic_friction> 0.50 </dynamic_friction>
   <rolling_friction> 0.02 </rolling_friction>
   <spring_coeff unit="LBS/FT"> 249900 </spring_coeff>
   <damping_coeff unit="LBS/FT/SEC">   83300  </damping_coeff>
   <max_steer unit="DEG">0</max_steer>
   <brake_group>RIGHT</brake_group>
   <retractable>0</retractable>
 </contact>

 <contact type="STRUCTURE" name="TAIL">
   <location unit="M">
     <x>  3.918 </x>
     <y>  0.000 </y>
     <z> -1.033 </z>
   </location>
   <static_friction>  0.80 </static_friction>
   <dynamic_friction> 0.50 </dynamic_friction>
   <rolling_friction> 0.02 </rolling_friction>
   <spring_coeff unit="LBS/FT"> 249900 </spring_coeff>
   <damping_coeff unit="LBS/FT/SEC">   83300  </damping_coeff>
   <max_steer unit="DEG">0</max_steer>
   <brake_group>RIGHT</brake_group>
   <retractable>0</retractable>
 </contact>

 </ground_reactions>

 <propulsion>

   <engine file="Lycoming_O-290">
    <location unit="M">
      <x>  4.177 </x>
      <y>  0.000  </y>
      <z> -0.044  </z>
    </location>
    <orient unit="DEG">
      <pitch> 0.00 </pitch>
      <roll>   0.00 </roll>
      <yaw>   0.00 </yaw>
    </orient>
    <feed>0</feed>
    <thruster file="HA-12VF-1">
     <location unit="M">
      <x>  4.177 </x>
      <y>  0.000  </y>
      <z> -0.044  </z>
     </location>
     <orient unit="DEG">
       <pitch> 0.00 </pitch>
       <roll>   0.00 </roll>
       <yaw>   0.00 </yaw>
     </orient>
    </thruster>
  </engine>

  <tank type="FUEL" number="0">
     <location unit="M">
       <x> -1.945 </x>
       <y>  0.000 </y>
       <z> -0.899 </z>
     </location>
     <capacity unit="LBS"> 144.00 </capacity>
     <contents unit="LBS"> 144.00 </contents>
  </tank>

 </propulsion>

 <flight_control name="FCS: aerocar">

  <channel name="Pitch">
   <summer name="Pitch Trim Sum">
      <input>fcs/elevator-cmd-norm</input>
      <input>fcs/pitch-trim-cmd-norm</input>
      <clipto>
        <min> -1 </min>
        <max>  1 </max>
      </clipto>
   </summer>

   <aerosurface_scale name="Elevator Control">
      <input>fcs/pitch-trim-sum</input>
      <range>
        <min> -0.44 </min>
        <max>  0.17 </max>
      </range>
      <output>fcs/elevator-pos-rad</output>
   </aerosurface_scale>

   <aerosurface_scale name="elevator normalization">
      <input>fcs/elevator-pos-rad</input>
      <domain>
        <min> -0.44 </min>
        <max>  0.17 </max>
      </domain>
      <range>
        <min> -1 </min>
        <max>  1 </max>
      </range>
      <output>fcs/elevator-pos-norm</output>
   </aerosurface_scale>

  </channel>

  <channel name="Roll">
   <summer name="Roll Trim Sum">
      <input>fcs/aileron-cmd-norm</input>
      <input>fcs/roll-trim-cmd-norm</input>
      <clipto>
        <min> -1 </min>
        <max>  1 </max>
      </clipto>
   </summer>

   <aerosurface_scale name="Left Aileron Control">
      <input>fcs/roll-trim-sum</input>
      <range>
        <min> -0.35 </min>
        <max>  0.10 </max>
      </range>
      <output>fcs/left-aileron-pos-rad</output>
   </aerosurface_scale>

   <aerosurface_scale name="Right Aileron Control">
      <input>fcs/roll-trim-sum</input>
      <range>
        <min> -0.35 </min>
        <max>  0.10 </max>
      </range>
      <output>fcs/right-aileron-pos-rad</output>
   </aerosurface_scale>

   <aerosurface_scale name="left aileron normalization">
      <input>fcs/left-aileron-pos-rad</input>
      <domain>
        <min> -0.35 </min>
        <max>  0.10 </max>
      </domain>
      <range>
        <min> -1 </min>
        <max>  1 </max>
      </range>
      <output>fcs/left-aileron-pos-norm</output>
   </aerosurface_scale>

   <aerosurface_scale name="right aileron normalization">
      <input>fcs/right-aileron-pos-rad</input>
      <domain>
        <min> -0.35 </min>
        <max>  0.10 </max>
      </domain>
      <range>
        <min> -1 </min>
        <max>  1 </max>
      </range>
      <output>fcs/right-aileron-pos-norm</output>
   </aerosurface_scale>

  </channel>

  <channel name="Yaw">

   <summer name="Rudder Command Sum">
      <input>-fcs/aileron-cmd-norm</input>
      <input>fcs/yaw-trim-cmd-norm</input>
      <clipto>
        <min> -1 </min>
        <max>  1 </max>
      </clipto>
   </summer>

   <aerosurface_scale name="Rudder Control">
      <input>fcs/rudder-command-sum</input>
      <range>
        <min> -0.44 </min>
        <max>  0.44 </max>
      </range>
      <output>fcs/rudder-pos-rad</output>
   </aerosurface_scale>

   <aerosurface_scale name="rudder normalization">
      <input>fcs/rudder-pos-rad</input>
      <domain>
        <min> -0.44 </min>
        <max>  0.44 </max>
      </domain>
      <range>
        <min> -1 </min>
        <max>  1 </max>
      </range>
      <output>fcs/rudder-pos-norm</output>
   </aerosurface_scale>

  </channel>

  <channel name="Landing Gear">

   <summer name="Steer Command Sum">
      <input>fcs/aileron-cmd-norm</input>
      <clipto>
        <min> -1 </min>
        <max>  1 </max>
      </clipto>
   </summer>

   <aerosurface_scale name="Steer Control">
      <input>fcs/steer-command-sum</input>
      <range>
        <min> -30 </min>
        <max>  30 </max>
      </range>
      <output>fcs/steer-pos-deg</output>
      <output>fcs/steer-pos-deg[1]</output>
   </aerosurface_scale>

   <aerosurface_scale name="steer normalization">
      <input>fcs/steer-pos-deg</input>
      <domain>
        <min> -30 </min>
        <max>  30 </max>
      </domain>
      <range>
        <min> -1 </min>
        <max>  1 </max>
      </range>
      <output>fcs/steer-pos-norm</output>
   </aerosurface_scale>
  </channel>

 </flight_control>

 <aerodynamics>

  <axis name="LIFT">

    <function name="aero/coefficient/CLalpha">
      <description>Lift_due_to_alpha</description>
      <product>
          <property>aero/qbar-psf</property>
          <property>metrics/Sw-sqft</property>
          <property>/controls/doors/transform/position-norm</property>
          <table>
            <independentVar lookup="row">aero/alpha-rad</independentVar>
            <tableData>
              -0.20 -0.750
               0.00 0.250
             0.23    1.400
               0.60 0.710
            </tableData>
          </table>
      </product>
    </function>

    <function name="aero/coefficient/CLde">
       <description>Lift_due_to_Elevator_Deflection</description>
       <product>
           <property>aero/qbar-psf</property>
           <property>metrics/Sw-sqft</property>
           <property>fcs/elevator-pos-rad</property>
           <value>0.2</value>
       </product>
    </function>

  </axis>

  <axis name="DRAG">

    <function name="aero/coefficient/CD0">
       <description>Drag_at_zero_lift</description>
       <product>
          <property>aero/qbar-psf</property>
          <property>metrics/Sw-sqft</property>
          <table>
            <independentVar lookup="row">aero/alpha-rad</independentVar>
            <tableData>
             -1.57       1.500
             -0.26    0.036
              0.00    0.028
              0.26    0.036
              1.57       1.500
            </tableData>
          </table>
       </product>
    </function>

    <function name="aero/coefficient/CDi">
       <description>Induced_drag</description>
         <product>
           <property>aero/qbar-psf</property>
           <property>metrics/Sw-sqft</property>
           <property>aero/cl-squared</property>
           <value>0.04</value>
         </product>
    </function>

    <function name="aero/coefficient/CDmach">
       <description>Drag_due_to_mach</description>
        <product>
          <property>aero/qbar-psf</property>
          <property>metrics/Sw-sqft</property>
          <table>
            <independentVar lookup="row">velocities/mach</independentVar>
            <tableData>
                0.00      0.000
                0.7      0.000
                1.10      0.023
                1.80      0.015
            </tableData>
          </table>
        </product>
    </function>

    <function name="aero/coefficient/CDbeta">
       <description>Drag_due_to_sideslip</description>
       <product>
          <property>aero/qbar-psf</property>
          <property>metrics/Sw-sqft</property>
          <table>
            <independentVar lookup="row">aero/beta-rad</independentVar>
            <tableData>
              -1.57       1.230
              -0.26    0.050
               0.00       0.000
               0.26    0.050
               1.57       1.230
            </tableData>
          </table>
       </product>
    </function>

    <function name="aero/coefficient/CDde">
       <description>Drag_due_to_Elevator_Deflection</description>
       <product>
           <property>aero/qbar-psf</property>
           <property>metrics/Sw-sqft</property>
           <abs><property>fcs/elevator-pos-norm</property></abs>
           <value>0.04</value>
       </product>
    </function>

  </axis>

  <axis name="SIDE">

    <function name="aero/coefficient/CYb">
       <description>Side_force_due_to_beta</description>
       <product>
           <property>aero/qbar-psf</property>
           <property>metrics/Sw-sqft</property>
           <property>aero/beta-rad</property>
           <value>-1</value>
       </product>
    </function>

  </axis>

  <axis name="ROLL">

    <function name="aero/coefficient/Clb">
       <description>Roll_moment_due_to_beta</description>
       <product>
           <property>aero/qbar-psf</property>
           <property>metrics/Sw-sqft</property>
           <property>metrics/bw-ft</property>
           <property>aero/beta-rad</property>
           <value>-0.1</value>
       </product>
    </function>

    <function name="aero/coefficient/Clp">
       <description>Roll_moment_due_to_roll_rate</description>
       <product>
           <property>aero/qbar-psf</property>
           <property>metrics/Sw-sqft</property>
           <property>metrics/bw-ft</property>
           <property>aero/bi2vel</property>
           <property>velocities/p-aero-rad_sec</property>
           <value>-0.4</value>
       </product>
    </function>

    <function name="aero/coefficient/Clr">
       <description>Roll_moment_due_to_yaw_rate</description>
       <product>
           <property>aero/qbar-psf</property>
           <property>metrics/Sw-sqft</property>
           <property>metrics/bw-ft</property>
           <property>aero/bi2vel</property>
           <property>velocities/r-aero-rad_sec</property>
           <value>0.15</value>
       </product>
    </function>

    <function name="aero/coefficient/Clda">
       <description>Roll_moment_due_to_aileron</description>
       <product>
          <property>aero/qbar-psf</property>
          <property>metrics/Sw-sqft</property>
          <property>metrics/bw-ft</property>
          <property>fcs/left-aileron-pos-rad</property>
          <table>
            <independentVar lookup="row">velocities/mach</independentVar>
            <tableData>
              0.0    0.170
              2.0    0.057
            </tableData>
          </table>
       </product>
    </function>

    <function name="aero/coefficient/Cldr">
       <description>Roll_moment_due_to_rudder</description>
       <product>
           <property>aero/qbar-psf</property>
           <property>metrics/Sw-sqft</property>
           <property>metrics/bw-ft</property>
           <property>fcs/rudder-pos-rad</property>
           <value>0.01</value>
       </product>
    </function>

  </axis>

  <axis name="PITCH">

    <function name="aero/coefficient/Cmalpha">
       <description>Pitch_moment_due_to_alpha</description>
       <product>
           <property>aero/qbar-psf</property>
           <property>metrics/Sw-sqft</property>
           <property>metrics/cbarw-ft</property>
           <property>aero/alpha-rad</property>
           <value>-0.5</value>
       </product>
    </function>

    <function name="aero/coefficient/Cmde">
       <description>Pitch_moment_due_to_elevator</description>
       <product>
          <property>aero/qbar-psf</property>
          <property>metrics/Sw-sqft</property>
          <property>metrics/cbarw-ft</property>
          <property>fcs/elevator-pos-rad</property>
          <table>
            <independentVar lookup="row">velocities/mach</independentVar>
            <tableData>
              0.0     -1.100
              2.0     -0.275
            </tableData>
          </table>
       </product>
    </function>

    <function name="aero/coefficient/Cmq">
       <description>Pitch_moment_due_to_pitch_rate</description>
       <product>
           <property>aero/qbar-psf</property>
           <property>metrics/Sw-sqft</property>
           <property>metrics/cbarw-ft</property>
           <property>aero/ci2vel</property>
           <property>velocities/q-aero-rad_sec</property>
           <value>-12</value>
       </product>
    </function>

    <function name="aero/coefficient/Cmadot">
       <description>Pitch_moment_due_to_alpha_rate</description>
       <product>
           <property>aero/qbar-psf</property>
           <property>metrics/Sw-sqft</property>
           <property>metrics/cbarw-ft</property>
           <property>aero/ci2vel</property>
           <property>aero/alphadot-rad_sec</property>
           <value>-7</value>
       </product>
    </function>

  </axis>

  <axis name="YAW">

    <function name="aero/coefficient/Cnb">
       <description>Yaw_moment_due_to_beta</description>
       <product>
           <property>aero/qbar-psf</property>
           <property>metrics/Sw-sqft</property>
           <property>metrics/bw-ft</property>
           <property>aero/beta-rad</property>
           <value>0.12</value>
       </product>
    </function>

    <function name="aero/coefficient/Cnr">
       <description>Yaw_moment_due_to_yaw_rate</description>
       <product>
           <property>aero/qbar-psf</property>
           <property>metrics/Sw-sqft</property>
           <property>metrics/bw-ft</property>
           <property>aero/bi2vel</property>
           <property>velocities/r-aero-rad_sec</property>
           <value>-0.15</value>
       </product>
    </function>

    <function name="aero/coefficient/Cndr">
       <description>Yaw_moment_due_to_rudder</description>
       <product>
           <property>aero/qbar-psf</property>
           <property>metrics/Sw-sqft</property>
           <property>metrics/bw-ft</property>
           <property>fcs/rudder-pos-rad</property>
           <value>-0.1</value>
       </product>
    </function>

    <function name="aero/coefficient/Cnda">
       <description>Adverse_yaw</description>
       <product>
           <property>aero/qbar-psf</property>
           <property>metrics/Sw-sqft</property>
           <property>metrics/bw-ft</property>
           <property>fcs/left-aileron-pos-rad</property>
           <value>-0.01</value>
       </product>
    </function>

  </axis>

 </aerodynamics>

</fdm_config>
