<?xml version="1.0"?>
<propeller name="HA-12VF-1">
  <ixx> 1.3489 </ixx>
  <diameter unit="IN"> 75.0 </diameter>
  <numblades> 2 </numblades>
  <gearratio> 1 </gearratio> <!-- unknown -->

  <table name="C_THRUST" type="internal">
    <tableData>
	0		0.091701
	0.05	0.082135
	0.1		0.092672
	0.15	0.092724
	0.2		0.092583
	0.25	0.092525
	0.3		0.091989
	0.35	0.091205
	0.4		0.089902
	0.45	0.087941
	0.5		0.085343
	0.55	0.081273
	0.6		0.075466
	0.65	0.068282
	0.7		0.060537
	0.75	0.052614
	0.8		0.044516
	0.85	0.036263
	0.86	0.034594
	0.87	0.03292
	0.88	0.031239
	0.89	0.029552
	0.9		0.027862
	0.91	0.026164
	0.92	0.02446
	0.93	0.022753
	0.94	0.021039
	0.95	0.019319
	0.96	0.017594
	0.97	0.015864
	0.98	0.014128
	0.99	0.012389
	1		0.010643
	1.01	0.008897
	1.02	0.007124
	1.03	0.005342
	1.04	0.003566
	1.05	0.001784
	1.06	-0.000001
	1.07	-0.001789
	1.08	-0.003581
	1.09	-0.005377
    </tableData>
  </table>

  <table name="C_POWER" type = "internal">
    <tableData>
	0		0.062186
	0.05	0.056256
	0.1		0.066291
	0.15	0.063942
	0.2		0.063115
	0.25	0.0615
	0.3		0.061454
	0.35	0.06102
	0.4		0.061005
	0.45	0.061254
	0.5		0.061455
	0.55	0.061244
	0.6		0.059767
	0.65	0.056981
	0.7		0.053301
	0.75	0.048971
	0.8		0.043958
	0.85	0.038242
	0.86	0.037012
	0.87	0.035753
	0.88	0.034464
	0.89	0.033146
	0.9		0.0318
	0.91	0.030422
	0.92	0.029014
	0.93	0.027577
	0.94	0.026108
	0.95	0.024609
	0.96	0.02308
	0.97	0.02152
	0.98	0.019929
	0.99	0.018307
	1		0.016654
	1.01	0.014974
	1.02	0.013241
	1.03	0.011472
	1.04	0.009682
	1.05	0.007859
	1.06	0.006006
	1.07	0.004122
	1.08	0.002208
	1.09	0.000261
    </tableData>
  </table>

</propeller>
